// COMSOL Multiphysics 6.2.0.339 model "Uzd.mph"
// C0=0.01 segr
// Outline of the model tree

Parameters
  H = 1e-3[m]  // ширина канала
  L = 4*H  // длина рассматриваемой области
  V0 = 1e-4[m/s]  // типичная скорость
  C0 = 0.10[mol/m^3]  // начальная концентрация
  D1 = 1.33*1e-9[m^2/s]  // коэффициент диффузии катиона
  D2 = 2.05*1e-9[m^2/s]  // коэффициент диффузии аниона
  z1 = 1  // зарядовое число катионов
  z2 = -1  // зарядовое число анионов
  Pe = V0*H/D2  // число Пекле
  dnu = 0.8937*1e-3[Pa*s]  // динамическая вязкость
  R = 8.3145[J/(mol*K)]  // универсальная газовая постоянная
  T = 298.15[K]  // Температура
  F = 96485.33[C/mol]  // постоянная Фарадея
  dpr = 81*8.85*1e-12[F/m]  // диэлектрическая проницаемость электролита
  rho = 1002 [kg/m^3]  // плотность электролита
  D = D1*D2*(z1-z2)/(D1*z1-D2*z2)
  alfa = 0.002[V/s]  // скорость роста падения потенциала
  Rms = 0.0[V*m^2/A]  // сопротивление мембран и раствора электролита
  d = 0.00000[m]
  Na = 1  // отношение концентрации на границе с АОМ к ее значению на входе в канал
  Nc = 1  // отношение концентрации на границе с КОМ к ее значению на входе в канал
  dfitot0 = 0

Variables
  var1 "Variables 1" on domains -3, 1
    ix = F*(-F*z1^2*D1*C1*fix/(R*T)-D1*z1*C1x+z1*C1*u-F*z2^2*D2*C2*fix/(R*T)-D2*z2*C2x+z2*C2*u)
    iy = F*(-F*z1^2*D1*C1*fiy/(R*T)-D1*z1*C1y+z1*C1*v-F*z2^2*D2*C2*fiy/(R*T)-D2*z2*C2y+z2*C2*v)
    dfi = dfitot-dfiA-dfiC+Rms*ix
    Cas1 = if(Cas<0,1e-006,Cas)
    Ccs1 = if(Ccs<0,1e-006,Ccs)
    dfitot = dfitot0-alfa*t
    dfiA = -R*T*log(C0/Cas1)/F
    dfiC = -R*T*log(C0/Ccs1)/F
  cplvar1 "Variables 1a" on domains -3, 1
    intcpl_source_int = ix/(H*L)
    Cas = linext1(extrcpl_source_Cas)
    Ccs = linext2(extrcpl_source_Ccs)
    projcpl_source_iav = ix/H
    iav = genproj1(projcpl_source_iav)
    projcpl_source_iav2 = ix/L
    iav2 = genproj2(projcpl_source_iav2)
    dfiCm = linext2(extrcpl_source_dfiCm)
  cplvar2 "Variables 2"
    int = mod1.intop1(intcpl_source_int)
  cplvar3 "Variables 3" on boundaries 1
    extrcpl_source_Cas = C2
  cplvar4 "Variables 4" on boundaries 4
    extrcpl_source_Ccs = C1
    extrcpl_source_dfiCm = fi

Couplings
  intop1: Integration on domains 1 | frame = material
  linext1: LinearExtrusion on boundaries 1
    srcframe = material
    srcmap = {x, y}
    srcvertex1 = points 2
    srcvertex2 = points 1
    dstgeom = geom1
    dstframe = material
    dstvertex1 = points 16
    dstvertex2 = points 15
  linext2: LinearExtrusion on boundaries 4
    srcframe = material
    srcmap = {x, y}
    srcvertex1 = points 15
    srcvertex2 = points 16
    dstgeom = geom1
    dstframe = material
    dstvertex1 = points 1
    dstvertex2 = points 2
  genproj1: GeneralProjection on domains 1 | srcmap = {y, x}; srcframe = material; dstmap = y
  genproj2: GeneralProjection on domains 1 | srcmap = {x, y}; srcframe = material; dstmap = x

Geometry
  geom1 "Geometry 1" (2D, length unit µm)
    R1: Rectangle | size = {H, L}
    R2: Rectangle (disabled) | pos = {50, 0}; size = {H-100, L}
    pt1: Point (disabled) | p = {100, 1700}
    pt2: Point (disabled) | p = {200, 1700}
    pt3: Point (disabled) | p = {300, 1700}
    pt4: Point (disabled) | p = {400, 1700}
    pt5: Point (disabled) | p = {100, 1400}
    pt6: Point (disabled) | p = {200, 1400}
    pt7: Point (disabled) | p = {300, 1400}
    pt8: Point (disabled) | p = {400, 1400}
    pt9: Point (disabled) | p = {100, 1000}
    pt10: Point (disabled) | p = {200, 1000}
    pt11: Point (disabled) | p = {300, 1000}
    pt12: Point (disabled) | p = {400, 1000}
    pt13: Point (disabled) | p = {100, 700}
    pt14: Point (disabled) | p = {200, 700}
    pt15: Point (disabled) | p = {300, 700}
    pt16: Point (disabled) | p = {400, 700}
    pt17: Point (disabled) | p = {100, 400}
    pt18: Point (disabled) | p = {200, 400}
    pt19: Point (disabled) | p = {300, 400}
    pt20: Point (disabled) | p = {400, 400}
    c1: Circle (disabled) | pos = {500, 1150}; r = H*0.1875
    c2: Circle (disabled) | pos = {500, 2150}; r = H*0.1875
    c3: Circle (disabled) | pos = {500, 3150}; r = H*0.1875
    r1: Rectangle "Rectangle 1a" (disabled) | pos = {300, 1100}; size = {400, 80}
    c4: Circle (disabled) | pos = {300, 1140}; r = 40
    ca1: CircularArc (disabled)
      center = {350, 1140}
      r = 40
      point1 = {350, 1180}
      point2 = {350, 1100}
      angle1 = 90
      angle2 = 270
    ca2: CircularArc (disabled)
      specify = endsangle1
      center = {430.1913597951064, 725.2121991035904}
      r = 461.80363579121
      point1 = {350, 1180}
      point2 = {700, 1100}
      angle1 = 100
      angle2 = 54.2499968808
      clockwise = on
    ls1: LineSegment (disabled)
      specify1 = coord
      vertex1 = ca1(1) points 2
      coord1 = {350, 1100}
      specify2 = coord
      vertex2 = r1(1) points 2
      coord2 = {700, 1100}
    uni1: Union (disabled)
    dif2: Difference (disabled) | input = R1; input2 = c2, c3
    pare1: PartitionEdges (disabled) | edge = ca2(1) boundaries 1; ca1(1) boundaries 1; ls1(1) boundaries 1; param = 0.5
    dif3: Difference (disabled) | input = dif2; input2 = pare1
    pard1: PartitionDomains (disabled)
    r2: Rectangle "Rectangle 2a" (disabled) | pos = {300, 1050}; size = {500, 200}
    dif4: Difference (disabled) | input = dif2; input2 = ca1, ca2, ls1; keepadd = on; keepsubtract = on; keep = true
    dif5: Difference (disabled) | input = ca1, ca2, ls1
    csol1: ConvertToSolid (disabled) | input = ca1, ca2, ls1
    dif6: Difference (disabled) | input = R1; input2 = csol1
    ca3: CircularArc (disabled)
      center = {350, 2140}
      r = 40
      point1 = {350, 2180}
      point2 = {350, 2100}
      angle1 = 90
      angle2 = 270
    ca4: CircularArc (disabled)
      specify = endsangle1
      center = {430.1913597951064, 1725.2121991035904}
      r = 461.80363579121
      point1 = {350, 2180}
      point2 = {700, 2100}
      angle1 = 100
      angle2 = 54.2499968808
      clockwise = on
    ls2: LineSegment (disabled)
      specify1 = coord
      vertex1 = ca1 2
      coord1 = {350, 2100}
      specify2 = coord
      vertex2 = r1 2
      coord2 = {700, 2100}
    csol2: ConvertToSolid (disabled) | input = ca3, ca4, ls2
    ca5: CircularArc (disabled)
      center = {350, 3140}
      r = 40
      point1 = {350, 3180}
      point2 = {350, 3100}
      angle1 = 90
      angle2 = 270
    ca6: CircularArc (disabled)
      specify = endsangle1
      center = {430.1913597951064, 2725.2121991035906}
      r = 461.8036357912098
      point1 = {350, 3180}
      point2 = {700, 3100}
      angle1 = 100
      angle2 = 54.2499968808
      clockwise = on
    ls3: LineSegment (disabled)
      specify1 = coord
      vertex1 = ca1 2
      coord1 = {350, 3100}
      specify2 = coord
      vertex2 = r1 2
      coord2 = {700, 3100}
    csol3: ConvertToSolid (disabled) | input = ca5, ca6, ls3
    dif7: Difference (disabled) | input = dif6; input2 = csol2, csol3
    rot1: Rotate (disabled) | input = csol1; rot = 45; pos = {350, 1100}
    rot2: Rotate (disabled) | input = csol2; rot = 45; pos = {350, 2100}
    rot3: Rotate (disabled) | input = csol3; rot = 45; pos = {350, 3100}
    dif8: Difference (disabled) | input = R1; input2 = c1, c2, c3
    fin: Finalize "Form Union"
  part1 "Part 1" (2D, length unit m)

Physics
  chekf: DilutedSpecies "Transport of Diluted Species" on all domains
    dependent variable C1
    ShapeProperty.order_concentration = 2
    MassConsistentStabilization.massStreamlineDiffusion = 0
    MassConsistentStabilization.massCrosswindDiffusion = 0
    sp1: SpeciesProperties "Species Charges" (default)
    cdm1: ConvectionDiffusionMigration "Convection, Diffusion, and Migration" (default)
      u_src = userdef
      u = {u, v, 0}
      V = fi
      um = D1/(R*T)
      D_0 = {{D1}, {0}, {0}, {0}, {D1}, {0}, {0}, {0}, {D1}}
      z = z1
    nflx1: NoFlux (default)
    init1: init "Initial Values 1" (default) | C1 = C0
    flux1: Fluxes "Flux 1" (disabled) on boundaries 4 | species = 1; N0 = z1*D1*F*C1*fix/(R*T)
    out1: Outflow (disabled) on boundaries 4
    in1: Inflow on boundaries 2 | c0 = C0
    fl1: Fluxes "Flux 1a" on boundaries 3 | species = 1; N0 = -v*C1
    fl2: Fluxes "Flux 2" on boundaries 4 | species = 1; N0 = -ix/(F*z1)
    conc1: Concentration on boundaries 4 | c0 = Nc*C0; species = 1
  chekf2: DilutedSpecies "Transport of Diluted Species 2" on all domains
    dependent variable C2
    ShapeProperty.order_concentration = 2
    MassConsistentStabilization.massStreamlineDiffusion = 0
    MassConsistentStabilization.massCrosswindDiffusion = 0
    sp1: SpeciesProperties "Species Charges" (default)
    cdm1: ConvectionDiffusionMigration "Convection, Diffusion, and Migration" (default)
      u = {u, v, 0}
      V = fi
      um = D2/(R*T)
      D_0 = {{D2}, {0}, {0}, {0}, {D2}, {0}, {0}, {0}, {D2}}
      z = z2
    nflx1: NoFlux (default)
    init1: init "Initial Values 1" (default) | C2 = C0
    conc1: Concentration (disabled) on boundaries 2 | c0 = C0; species = 1
    flux1: Fluxes "Flux 1" (disabled) on boundaries 1 | species = 1; N0 = -z2*D2*F*C2*fix/(R*T)
    out1: Outflow (disabled) on boundaries 1
    in1: Inflow on boundaries 2 | c0 = C0
    fl1: Fluxes "Flux 1a" on boundaries 3 | species = 1; N0 = -v*C2
    conc2: Concentration on boundaries 1 | c0 = Na*C0; species = 1
    fl2: Fluxes "Flux 2" on boundaries 1 | species = 1; N0 = ix/(F*z2)
  g: GeneralFormPDE "PDE" on all domains
    dependent variable fi
    Units.DependentVariableQuantity = electricpotential
    Units.CustomSourceTermUnit = V
    gfeq1: GeneralFormPDE (default) | f = -F*(z1*C1+z2*C2)/dpr; Ga = {fix, fiy}; da = 0
    zflx1: ZeroFluxBoundary "Zero Flux 1" (default)
    init1: init "Initial Values 1" (default) | fi = -Rms*ix/2+(dfitot0+Rms*ix)*x/H
    cons1: Constraint (disabled) on boundaries 1 | R = dfiA
    cons2: Constraint (disabled) on boundaries 2 | R = -fi+dfiA+dfi*x/H
    cons3: Constraint (disabled) on boundaries 4 | R = -fi+dfitot-dfiC
    dir1: DirichletBoundary "Dirichlet Boundary Condition 1" (disabled) on boundaries 2
      r = -Rms*ix/2+(dfitot+Rms*ix)*x/H
      useDirichletCondition = 1
    dir2: DirichletBoundary "Dirichlet Boundary Condition 2" on boundaries 4 | r = dfiA-Rms*ix/2+dfi
    dir3: DirichletBoundary "Dirichlet Boundary Condition 3" on boundaries 1 | r = dfiA-Rms*ix/2
    peq1: PoissonEquation "Poisson's Equation 1" on domains 1 | f = F*(z1*C1+z2*C2)/(dpr)
    flux1: FluxBoundary "Flux/Source 1" on boundaries 2 | g = R*T*(D1*C1y-D2*C2y)/(F*(D1+D2)*C0)
  ns: LaminarFlow on all domains
    dependent variable u = {u, v, w_ns}
    ShapeProperty.order_fluid = 2
    InconsistentStabilization.delid = 0.5
    fp1: FluidProperties (default) | rho_mat = userdef; rho = rho; mu_mat = userdef; mu = dnu
    wall1: WallBC "Wall 1" (default) | BoundaryCondition = NoSlip; uwall = {0, d*vx, 0}
    init1: init "Initial Values 1" (default) | u = {{0}, {V0*6*x/H*(1-x/H)}, {0}}; p = 1e5
    vf1: VolumeForce on domains 1 | F = {dpr*(fixx+fiyy)*fix, dpr*(fixx+fiyy)*fiy, 0}
    inl1: Inlet on boundaries 2 | U0in = V0*6*x/H*(1-x/H); nutilde0 = 3*ns.nu
    out1: Outlet on boundaries 3 | BoundaryCondition = Velocity; p0 = 1e5; U0out = V0*6*x/H*(1-x/H)
    prpc1: PressurePointConstraint on points 2, 16 | p0 = 1e5

Mesh
  mesh11 "Inlet"
    size: MeshSizeDefault | table = cfd; hmax = 35; hgrad = 1.13; hauto = 4
    size1: Size on boundaries 1 | hmax = 6.7; hmin = 0.02; hcurve = 0.2; hgrad = 1.05; hauto = 1
    size2: Size on boundaries 4 | hmax = 6.7; hmin = 0.02; hcurve = 0.2; hgrad = 1.05; hauto = 1
    dis1: Distribution on boundaries 1, 4 | numelem = 200
    dis2: Distribution (disabled) on boundaries 1 | numelem = 160
    dis3: Distribution on boundaries 2, 3
      type = predefined
      elemcount = 170
      elemratio = 10
      symmetric = on
      method = geometric
    ftri1: FreeTri "Free Triangular 1" on domains 1
    bl1: BndLayer "Boundary Layers 1" on domains 1
      blp1: BndLayerProp "Boundary Layer Properties 1" on boundaries 1, 4
        blnlayers = 16
        blstretch = 1.28
        inittype = blhmin
        blhmin = 0.05
      blp2: BndLayerProp "Boundary Layer Properties 2" on boundaries 2 | blnlayers = 4; inittype = blhmin; blhmin = 1
    ftri2: FreeTri "Free Triangular 2" on remaining entities

Studies
  std7 "Study 7"
    time: Transient "Time Dependent" | tlist = range(0,1,1000); rtol = 0.005; usesol = on; mesh = {geom1, mesh11}

Solver configurations
  sol10 "Solver 10" (study std7)
    v1: Variables "Dependent Variables 1"
    t1: Time "Time-Dependent Solver 1" | tlist = range(0,1,1000); atolglobal = 0.0010; maxorder = 2
      d1: Direct | linsolver = pardiso
      se1: Segregated | ntolfact = 0.1
        ssDef: SegregatedStep | segvar = {mod1_C1, mod1_C2, mod1_fi}; subtermconst = itertol
        ss1: SegregatedStep | segvar = {mod1_u, mod1_p}; subtermconst = itertol

Datasets
  dset1: Solution | solution = sol10
  cln1: CutLine2D "middle" | data = dset1; genpoints = {{0, 1000}, {500, 1000}}
  cln2: CutLine2D "hight" | data = dset1; genpoints = {{0, 1900}, {500, 1900}}
  cln3: CutLine2D "low" | data = dset1; genpoints = {{0, 751}, {500, 751}}

Derived values
  int1: IntSurface "Surface Integration 1" on domains 1 | data = dset1; table = new; expr = ix/(H*L)
  int2: IntSurface "Surface Integration 2" on domains 1
    data = dset1
    table = tbl1
    expr = {, (ix/(H*L))/((2*F*D*C0/H)*((1.47*H*H*V0/(L*D))^(1/3)-0.2)), -(F*F/(R*T))*(z1*z1*D1*(C1x*fix+C1y*fiy)+z2*z2*D2*(C2x*fix+ C2y*fiy)) -(F*F/(R*T))*(z1*z1*D1*C1+ z2*z2*D2*C2)*( fixx+fiyy) -F*(z1*D1*(C1xx+C1yy)+z2*D2*(C2xx+C2yy)) +F*(u*(z1*C1x+z2*C2x)+v*(z1*C1y+z2*C2y))*((H-2*x)/(2*H*L))/((2*F*D*C0/H)*((1.47*H*H*V0/(L*D))^(1/3)-0.2)), (ix/(H*L))/((2*F*D*C0/H)*((1.47*H*H*V0/(L*D))^(1/3)-0.2))-(F*F/(R*T))*(z1*z1*D1*(C1x*fix+C1y*fiy)+z2*z2*D2*(C2x*fix+ C2y*fiy)) -(F*F/(R*T))*(z1*z1*D1*C1+ z2*z2*D2*C2)*( fixx+fiyy) -F*(z1*D1*(C1xx+C1yy)+z2*D2*(C2xx+C2yy)) +F*(u*(z1*C1x+z2*C2x)+v*(z1*C1y+z2*C2y))*((H-2*x)/(2*H*L))/((2*F*D*C0/H)*((1.47*H*H*V0/(L*D))^(1/3)-0.2))}
    descr = {, id0/ilim+, id1/ilim+, iav/ilim+}
  int3: IntSurface "Surface Integration 3" on domains 1
    data = dset1
    table = tbl1
    expr = {, (ix/(H*L))/((2*F*D*C0/H)*((1.47*H*H*V0/(L*D))^(1/3)-0.2)), -(F*F/(R*T))*(z1*z1*D1*(C1x*fix+C1y*fiy)+z2*z2*D2*(C2x*fix+ C2y*fiy)) -(F*F/(R*T))*(z1*z1*D1*C1+ z2*z2*D2*C2)*( fixx+fiyy) -F*(z1*D1*(C1xx+C1yy)+z2*D2*(C2xx+C2yy)) +F*(u*(z1*C1x+z2*C2x)+v*(z1*C1y+z2*C2y))*((H-2*x)/(2*H*L))/((2*F*D*C0/H)*((1.47*H*H*V0/(L*D))^(1/3)-0.2)), (ix/(H*L))/((2*F*D*C0/H)*((1.47*H*H*V0/(L*D))^(1/3)-0.2))-(F*F/(R*T))*(z1*z1*D1*(C1x*fix+C1y*fiy)+z2*z2*D2*(C2x*fix+ C2y*fiy)) -(F*F/(R*T))*(z1*z1*D1*C1+ z2*z2*D2*C2)*( fixx+fiyy) -F*(z1*D1*(C1xx+C1yy)+z2*D2*(C2xx+C2yy)) +F*(u*(z1*C1x+z2*C2x)+v*(z1*C1y+z2*C2y))*((H-2*x)/(2*H*L))/((2*F*D*C0/H)*((1.47*H*H*V0/(L*D))^(1/3)-0.2)), (F*(H-2*x)*(z1*C1t+z2*C2t)/(2*H*L))/((2*F*D*C0/H)*((1.47*H*H*V0/(L*D))^(1/3)-0.2)), , }
    descr = {, id0/ilim+, id1/ilim+, iav/ilim+, id/ilim, id, id0}
  int4: IntSurface "Surface Integration 4" on domains 1
    data = dset1
    table = tbl1
    expr = {, , -(F*F/(R*T))*(z1*z1*D1*(C1x*fix+C1y*fiy)+z2*z2*D2*(C2x*fix+ C2y*fiy)) -(F*F/(R*T))*(z1*z1*D1*C1+ z2*z2*D2*C2)*( fixx+fiyy) -F*(z1*D1*(C1xx+C1yy)+z2*D2*(C2xx+C2yy)) +F*(u*(z1*C1x+z2*C2x)+v*(z1*C1y+z2*C2y))*((H-2*x)/(2*H*L))/((2*F*D*C0/H)*((1.47*H*H*V0/(L*D))^(1/3)-0.2)), , (F*(H-2*x)*(z1*C1t+z2*C2t)/(2*H*L))/((2*F*D*C0/H)*((1.47*H*H*V0/(L*D))^(1/3)-0.2)), , }
    descr = {, id0/ilim+, id1/ilim+, iav/ilim+, id/ilim, id, id0}
  int5: IntSurface "Surface Integration 5" on domains 1
    data = dset1
    table = tbl2
    expr = F*F*(z1*z1*D1*C1+z2*z2*D2*C2)/(R*T*H*L)
    descr = Ksi av
  int6: IntSurface "Surface Integration 6" on domains 1 | data = dset1; table = tbl2; expr = F*(z1*C1+z2*C2)/(H*L)
  int7: IntSurface "Surface Integration 7" on domains 1 | data = dset1; table = tbl2; expr = C1/(H*L)
  int8: IntSurface "Surface Integration 8" on domains 1 | data = dset1; table = tbl2; expr = C2/(H*L)
  int9: IntSurface "Surface Integration 9" on domains 1
    data = dset1
    table = tbl1
    expr = {, , , , (F*(H-2*x)*(C1t-C2t)/(2*H*L)), , }
    descr = {, id0/ilim+, id1/ilim+, iav/ilim+, id/ilim, id, id0}
  int10: IntSurface "Iav/Ilim" on all domains
    data = dset1
    table = tbl4
    expr = {, , , (ix/(H*L))/((2*F*D*C0/H)*((1.47*H*H*V0/(L*D))^(1/3)-0.2))}
    descr = {, id0/ilim+, id1/ilim+, iav/ilim+}
  pev1: EvalPoint "Point Evaluation 1"
    data = dset1
    table = tbl3
    expr = (ix/(1))/((2*F*D*C0/H)*((1.47*H*H*V0/(L*D))^(1/3)-0.2))
    descr = ix/i lim
  int11: IntSurface "iavbig" on domains 1
    data = dset1
    table = tbl1
    expr = {, , , (ix/(H*L))/((2*F*D*C0/H)*((1.47*H*H*V0/(L*D))^(1/3)-0.2))-(F*F/(R*T))*(z1*z1*D1*(C1x*fix+C1y*fiy)+z2*z2*D2*(C2x*fix+ C2y*fiy)) -(F*F/(R*T))*(z1*z1*D1*C1+ z2*z2*D2*C2)*( fixx+fiyy) -F*(z1*D1*(C1xx+C1yy)+z2*D2*(C2xx+C2yy)) +F*(u*(z1*C1x+z2*C2x)+v*(z1*C1y+z2*C2y))*((H-2*x)/(2*H*L))/((2*F*D*C0/H)*((1.47*H*H*V0/(L*D))^(1/3)-0.2))}
    descr = {, id0/ilim+, id1/ilim+, iav/ilim+}
  int12: IntLine "Line Integration 12"
    data = dset1
    table = tbl1
    expr = (ix/(L))/((2*F*D*C0/H)*((1.47*H*H*V0/(L*D))^(1/3)-0.2))
    descr = ix/L x=50
  int13: IntLine "Line Integration 13"
    data = dset1
    table = tbl1
    expr = (ix/(L))/((2*F*D*C0/H)*((1.47*H*H*V0/(L*D))^(1/3)-0.2))
    descr = ix/L x=450
  int14: IntLine "Line Integration 14"
    data = dset1
    table = tbl5
    expr = (ix/(L))/((2*F*D*C0/H)*((1.47*H*H*V0/(L*D))^(1/3)-0.2))
    descr = ix/L x=250
  int15: IntLine "Line Integration 15" on boundaries 1
    data = dset1
    table = tbl5
    expr = (ix/(L))/((2*F*D*C0/H)*((1.47*H*H*V0/(L*D))^(1/3)-0.2))
    descr = ix/L x=0
  int16: IntLine "Line Integration 16" on boundaries 4
    data = dset1
    table = tbl5
    expr = (ix/(L))/((2*F*D*C0/H)*((1.47*H*H*V0/(L*D))^(1/3)-0.2))
    descr = ix/L x=500

Tables
  tbl1: Table
    // Surface Integration 2 (, (ix/(H*L))/((2*F*D*C0/H)*((1.47*H*H*V0/(L*D))^(1/3)-0.2)), -(F*F/(R*T))*(z1*z1*D1*(C1x*fix+C1y*fiy)+z2*z2*D2*(C2x*fix+ C2y*fiy)) -(F*F/(R*T))*(z1*z1*D1*C1+ z2*z2*D2*C2)*( fixx+fiyy) -F*(z1*D1*(C1xx+C1yy)+z2*D2*(C2xx+C2yy)) +F*(u*(z1*C1x+z2*C2x)+v*(z1*C1y+z2*C2y))*((H-2*x)/(2*H*L))/((2*F*D*C0/H)*((1.47*H*H*V0/(L*D))^(1/3)-0.2)), (ix/(H*L))/((2*F*D*C0/H)*((1.47*H*H*V0/(L*D))^(1/3)-0.2))-(F*F/(R*T))*(z1*z1*D1*(C1x*fix+C1y*fiy)+z2*z2*D2*(C2x*fix+ C2y*fiy)) -(F*F/(R*T))*(z1*z1*D1*C1+ z2*z2*D2*C2)*( fixx+fiyy) -F*(z1*D1*(C1xx+C1yy)+z2*D2*(C2xx+C2yy)) +F*(u*(z1*C1x+z2*C2x)+v*(z1*C1y+z2*C2y))*((H-2*x)/(2*H*L))/((2*F*D*C0/H)*((1.47*H*H*V0/(L*D))^(1/3)-0.2)))
    Time (s) | iav/ilim+
    0 | 4.09666e-16
    1 | 0.0248955
    2 | 0.04876
    3 | 0.0719414
    4 | 0.0945759
    5 | 0.116722
    6 | 0.138496
    7 | 0.159853
    8 | 0.180847
    9 | 0.201484
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  tbl2: Table
    // Surface Integration 5 (F*F*(z1*z1*D1*C1+z2*z2*D2*C2)/(R*T*H*L))
    Time (s) | F*F*(z1*z1*D1*C1+z2*z2*D2*C2)/(R*T*H*L) (S/m)
    0 | 0.000126931
    0.2 | 0.000126918
    0.4 | 0.000126883
    0.6 | 0.000126826
    0.8 | 0.000126748
    1 | 0.000126652
    1.2 | 0.000126538
    1.4 | 0.000126406
    1.6 | 0.000126257
    1.8 | 0.000126094
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  tbl3: Table
    // Point Evaluation 1
    Time (s) | ix/i lim (1), Point: 8 | ix/i lim (1), Point: 25
    0 | -6.8333e-16 | 7.41368e-15
    0.5 | 0.0454208 | 0.0454205
    1 | 0.0875971 | 0.0875961
    1.5 | 0.127718 | 0.127716
    2 | 0.166089 | 0.166082
    2.5 | 0.202959 | 0.202951
    3 | 0.23848 | 0.238465
    3.5 | 0.272667 | 0.272645
    4 | 0.305523 | 0.305478
    4.5 | 0.337247 | 0.337217
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  tbl4: Table
    // Line Integration 12
    Time (s) | iav/ilim+ (1)
    0 | 2.76173e-16
    1 | 0.0249185
    2 | 0.0487941
    3 | 0.0719675
    4 | 0.0945755
    5 | 0.116748
    6 | 0.138479
    7 | 0.159821
    8 | 0.180802
    9 | 0.201483
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
Plots
  pg2: PlotGroup2D "Concentration (chekf2)" | data = dset1
    surf1: Surface | expr = C1-C2
      hght1: Height "Height Expression 1" | expr = C1
    con1: Contour | expr = C1-C2
      hght1: Height "Height Expression 1" (disabled) | expr = C1
  pg3: PlotGroup2D "Countur" | data = dset1
    surf1: Surface (disabled) | expr = F*(C1-C2)
      hght1: Height "Height Expression 1" | expr = C1
    con1: Contour | expr = -fix; levels = range(-0.5,0.01,0.5)
      hght1: Height "Height Expression 1" | expr = C1
  pg4: PlotGroup2D "Velocity (ns)" | data = dset1
    surf1: Surface | expr = C1
    str1: Streamline | expr = {u, v}; udist = 0.015
  pg5: PlotGroup2D "Pressure (ns)" | data = dset1
    con1: Contour | expr = p
  pg8: PlotGroup1D "C1 low+" | data = dset1
    lngr1: LineGraph | data = cln3; inputmode = linesecond; expr = (C1-C2)*F
  pg9: PlotGroup1D "C1 middle" | data = dset1
    lngr1: LineGraph | data = cln1; expr = C1; autoexpr = on
  pg10: PlotGroup1D "C1 low" | data = dset1
    lngr1: LineGraph | data = cln3; expr = C1; autoexpr = on
  pg12: PlotGroup1D "C1-C2 high 1" | data = dset1
    lngr1: LineGraph | data = cln2; expr = C1-C2
  pg13: PlotGroup1D "C1-C2 middle" | data = dset1
    lngr1: LineGraph | data = cln1; expr = F*(C1-C2)
  pg14: PlotGroup2D "2D Plot Group 14" | data = dset1
    surf1: Surface (disabled) | expr = C1
    str1: Streamline | expr = {u, v}; udist = 0.01
  pg15: PlotGroup1D "Ksi" | data = dset1
    lngr1: LineGraph on boundaries 3 | expr = F*F*(z1*z1*D1*C1+z2*z2*D2*C2)/(R*T)
  pg16: PlotGroup1D "1D Plot Group 16" | data = none
    tblp1: Table "Table Graph 1" | table = tbl1
    lngr1: LineGraph | expr = C1
  pg17: PlotGroup1D "1D Plot Group 17" | data = none
    tblp1: Table "Table Graph 1" | table = tbl2
  pg18: PlotGroup1D "new" (disabled) | data = dset1
    lngr1: LineGraph | expr = C1
    lngr2: LineGraph | expr = C1
  pg19: PlotGroup1D "C1 middle 1" | data = dset1; xlabel = x (µm); ylabel = Concentration (mol/m<sup>3</sup>)
    lngr1: LineGraph | data = cln1; expr = C1-C2; autoexpr = on
    lngr2: LineGraph | data = cln1; expr = C1; autoexpr = on
  pg20: PlotGroup2D "2D Plot Group 20" | data = dset1
    surf1: Surface | expr = (C1*D1*z1*z1+C2*D2*z2*z2)*F*F/(R*T)
      hght1: Height "Height Expression 1" | expr = C1
  pg21: PlotGroup2D "Concentration (chekf2) 1" | data = dset1
    surf1: Surface | expr = F*(C1-C2)
      hght1: Height "Height Expression 1" | expr = C1; offset = 200
  pg22: PlotGroup2D "2D Plot Group 22" | data = dset1
    surf1: Surface (disabled) | expr = (C1-C2)
      hght1: Height "Height Expression 1" | expr = C1
    con1: Contour | expr = C1-C2; levelmethod = levels; levels = range(0,1.0e-8,5.0e-7)
  pg23: PlotGroup2D "2D Plot Group 23" | data = dset1
    con1: Contour | expr = C1-C2; levelmethod = levels; levels = range(-1.0e-6,1.0e-8,1.0e-6)
  pg24: PlotGroup1D "1D Plot Group 24" | data = none
    tblp1: Table "Table Graph 1" | table = tbl3
  pg25: PlotGroup1D "1D Plot Group 25" | data = none
    tblp1: Table "Table Graph 1" | table = tbl1
  pg26: PlotGroup1D "1D Plot Group 26" | data = none
    tblp1: Table "Table Graph 1" | table = tbl4
  pg27: PlotGroup1D "1D Plot Group 27" | data = none
    tblp1: Table "Table Graph 1" | table = tbl5

Exports
  anim2: Animation "C1-C2contour+"
    giffilename = W:\p01936\proboy\veloUZD600.gif
    avifilename = W:\p01936\proboy\C1-C2best.avi
    framesel = all
    maxframes = 601
  anim3: Animation "C1 middle"
    movietype = avi
    avifilename = W:\p01936\M_0.01_0.5x2_1_10-4\C1-C2countur.avi
    framesel = all
    maxframes = 1492
  anim4: Animation "C1 low"
    movietype = avi
    avifilename = W:\p01936\M_0.01_0.5x0.5_1_10-4\+C1 low250мм.avi
    maxframes = 1454
  anim5: Animation "C1-C2 high"
    movietype = avi
    avifilename = W:\p01936\C1-C2 high right.avi
    maxframes = 1253
    size = current
  anim6: Animation "C1-C2 middle"
    movietype = avi
    avifilename = W:\p01936\C1-C2 middle right.avi
    maxframes = 1253
    size = current
  anim7: Animation "F(C1-C2)"
    movietype = avi
    avifilename = W:\p01936\proboy\F(C1-C2).avi
    framesel = all
    maxframes = 1201
  anim8: Animation | movietype = avi; avifilename = W:\p01936\xhi.avi; maxframes = 1492
  anim9: Animation "contour" | movietype = avi; avifilename = W:\p01936\proboy\stream.avi; framesel = all
  anim10: Animation | giffilename = W:\p01936\proboy\vax.gif